units real
atom_style full

dimension 3
boundary p p p

bond_style harmonic
angle_style harmonic
dihedral_style fourier
special_bonds lj 0.0 0.0 0.5 coul 0.0 0.0 0.83333333

read_data epon_validation.data

pair_style lj/cut/coul/long 9.0 9.0
pair_modify mix arithmetic tail yes
kspace_style pppm 1e-8

include epon_validation.parm

thermo_style custom ebond eangle edihed eimp epair evdwl ecoul elong etail pe

run 0
